// COMSOL Multiphysics 6.3.0.290 model "guided_wave_metasurface_structure.mph"
// Outline of the model tree

Parameters
  lambda0 = 1.55[um]  // vacuum wavelength
  freq0 = c_const/lambda0  // optical frequency
  wg_w = 0.6[um]  // Si waveguide width
  wg_h = 0.22[um]  // Si waveguide height
  box_h = 3.0[um]  // buried oxide thickness
  sub_h = 1.0[um]  // modeled Si handle thickness
  Lambda = 0.575[um]  // three-atom supercell period
  atom_pitch = Lambda/3  // meta-atom center spacing
  n_cells = 12  // number of modeled supercells
  array_L = n_cells*Lambda  // metasurface length
  port_buffer = 2.0[um]  // bare waveguide at each end
  device_L = array_L+2*port_buffer  // total modeled length
  domain_w = 4.0[um]  // transverse domain width
  air_h = 3.0[um]  // air height above BOX
  monitor_z = 1.0[um]  // monitor height above antenna
  t_au = 0.03[um]  // each gold layer thickness
  t_d = 0.03[um]  // antenna SiO2 spacer thickness
  array_x0 = -array_L/2  // first supercell origin
  sel_tol = 1[nm]  // boundary selection tolerance
  n_air = 1.0
  n_si = 3.48
  n_sio2 = 1.444
  n_au = 0.55  // Au n seed at 1550 nm
  k_au = 11.5  // Au extinction seed at 1550 nm
  mesh_bulk = lambda0/(10*n_si)  // paper minimum local wavelength step
  mesh_metal = 0.015[um]  // local antenna mesh maximum
  lx_p = 0.11[um]  // phase_plus_2pi_3_seed x size
  ly_p = 0.19[um]  // phase_plus_2pi_3_seed y size
  lx_z = 0.1[um]  // phase_zero_seed x size
  ly_z = 0.275[um]  // phase_zero_seed y size
  lx_m = 0.11[um]  // phase_minus_2pi_3_seed x size
  ly_m = 0.295[um]  // phase_minus_2pi_3_seed y size

Selections
  sel_si: Union "silicon waveguide and handle" | entitydim = 3; input = {geom1_waveguide_dom, geom1_substrate_dom}
  sel_au: Union "all gold antenna layers"
    entitydim = 3
    input = {geom1_au_b_000_dom, geom1_au_b_001_dom, geom1_au_b_002_dom, geom1_au_b_003_dom, geom1_au_b_004_dom, geom1_au_b_005_dom, geom1_au_b_006_dom, geom1_au_b_007_dom, geom1_au_b_008_dom, geom1_au_b_009_dom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}
  sel_sio2: Union "BOX and antenna SiO2"
    entitydim = 3
    input = {geom1_box_dom, geom1_sp_000_dom, geom1_sp_001_dom, geom1_sp_002_dom, geom1_sp_003_dom, geom1_sp_004_dom, geom1_sp_005_dom, geom1_sp_006_dom, geom1_sp_007_dom, geom1_sp_008_dom, geom1_sp_009_dom, geom1_sp_010_dom, geom1_sp_011_dom, geom1_sp_012_dom, geom1_sp_013_dom, geom1_sp_014_dom, geom1_sp_015_dom, geom1_sp_016_dom, geom1_sp_017_dom, geom1_sp_018_dom, geom1_sp_019_dom, geom1_sp_020_dom, geom1_sp_021_dom, geom1_sp_022_dom, geom1_sp_023_dom, geom1_sp_024_dom, geom1_sp_025_dom, geom1_sp_026_dom, geom1_sp_027_dom, geom1_sp_028_dom, geom1_sp_029_dom, geom1_sp_030_dom, geom1_sp_031_dom, geom1_sp_032_dom, geom1_sp_033_dom, geom1_sp_034_dom, geom1_sp_035_dom}
  sel_atoms: Union "all antenna domains"
    entitydim = 3
    input = {geom1_au_b_000_dom, geom1_sp_000_dom, geom1_au_t_000_dom, geom1_au_b_001_dom, geom1_sp_001_dom, geom1_au_t_001_dom, geom1_au_b_002_dom, geom1_sp_002_dom, geom1_au_t_002_dom, geom1_au_b_003_dom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}
  sel_non_air: Union "all non-air domains" | entitydim = 3; input = {sel_si, sel_au, sel_sio2}
  sel_air: Difference "air only" | entitydim = 3; add = {geom1_air_domain_dom}; subtract = {sel_non_air}
  sel_port_in: Box "input port x-min"
    entitydim = 2
    xmin = -device_L/2-sel_tol
    xmax = -device_L/2+sel_tol
    ymin = -domain_w/2-sel_tol
    ymax = domain_w/2+sel_tol
    zmin = -box_h-sub_h-sel_tol
    zmax = air_h+sel_tol
    condition = inside
  sel_port_out: Box "output port x-max"
    entitydim = 2
    xmin = device_L/2-sel_tol
    xmax = device_L/2+sel_tol
    ymin = -domain_w/2-sel_tol
    ymax = domain_w/2+sel_tol
    zmin = -box_h-sub_h-sel_tol
    zmax = air_h+sel_tol
    condition = inside
  sel_open_top: Box "top scattering boundary"
    entitydim = 2
    xmin = -device_L/2-sel_tol
    xmax = device_L/2+sel_tol
    ymin = -domain_w/2-sel_tol
    ymax = domain_w/2+sel_tol
    zmin = air_h-sel_tol
    zmax = air_h+sel_tol
    condition = inside
  sel_open_bottom: Box "bottom scattering boundary"
    entitydim = 2
    xmin = -device_L/2-sel_tol
    xmax = device_L/2+sel_tol
    ymin = -domain_w/2-sel_tol
    ymax = domain_w/2+sel_tol
    zmin = -box_h-sub_h-sel_tol
    zmax = -box_h-sub_h+sel_tol
    condition = inside
  sel_open_ymin: Box "negative-y scattering boundary"
    entitydim = 2
    xmin = -device_L/2-sel_tol
    xmax = device_L/2+sel_tol
    ymin = -domain_w/2-sel_tol
    ymax = -domain_w/2+sel_tol
    zmin = -box_h-sub_h-sel_tol
    zmax = air_h+sel_tol
    condition = inside
  sel_open_ymax: Box "positive-y scattering boundary"
    entitydim = 2
    xmin = -device_L/2-sel_tol
    xmax = device_L/2+sel_tol
    ymin = domain_w/2-sel_tol
    ymax = domain_w/2+sel_tol
    zmin = -box_h-sub_h-sel_tol
    zmax = air_h+sel_tol
    condition = inside
  sel_open: Union "all non-port exterior boundaries"
    entitydim = 2
    input = {sel_open_top, sel_open_bottom, sel_open_ymin, sel_open_ymax}

Geometry
  geom1 "SOI waveguide and Au-SiO2-Au meta-atoms" (3D, length unit µm)
    air_domain: Block "air computational domain" | size = {device_L, domain_w, air_h}; pos = {-device_L/2, -domain_w/2, 0}
    box: Block "3 um buried silicon dioxide"
      size = {device_L, domain_w, box_h}
      pos = {-device_L/2, -domain_w/2, -box_h}
    substrate: Block "silicon handle (truncated)"
      size = {device_L, domain_w, sub_h}
      pos = {-device_L/2, -domain_w/2, -box_h-sub_h}
    waveguide: Block "600 nm x 220 nm silicon ridge" | size = {device_L, wg_w, wg_h}; pos = {-device_L/2, -wg_w/2, 0}
    au_b_000: Block "atom 000 bottom Au phase p"
      size = {lx_p, ly_p, t_au}
      pos = {array_x0+(0+0.5)*atom_pitch-lx_p/2, -ly_p/2, wg_h}
    sp_000: Block "atom 000 SiO2 spacer phase p"
      size = {lx_p, ly_p, t_d}
      pos = {array_x0+(0+0.5)*atom_pitch-lx_p/2, -ly_p/2, wg_h+t_au}
    au_t_000: Block "atom 000 top Au phase p"
      size = {lx_p, ly_p, t_au}
      pos = {array_x0+(0+0.5)*atom_pitch-lx_p/2, -ly_p/2, wg_h+t_au+t_d}
    au_b_001: Block "atom 001 bottom Au phase z"
      size = {lx_z, ly_z, t_au}
      pos = {array_x0+(1+0.5)*atom_pitch-lx_z/2, -ly_z/2, wg_h}
    sp_001: Block "atom 001 SiO2 spacer phase z"
      size = {lx_z, ly_z, t_d}
      pos = {array_x0+(1+0.5)*atom_pitch-lx_z/2, -ly_z/2, wg_h+t_au}
    au_t_001: Block "atom 001 top Au phase z"
      size = {lx_z, ly_z, t_au}
      pos = {array_x0+(1+0.5)*atom_pitch-lx_z/2, -ly_z/2, wg_h+t_au+t_d}
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    fin: Finalize "形成联合体"

Materials
  mat_air: Common "Air" on selection sel_air
    RefractiveIndex: RefractiveIndex "折射率"
      n = n_air
      ki = 0
  mat_si: Common "Silicon" on selection sel_si
    RefractiveIndex: RefractiveIndex "折射率"
      n = n_si
      ki = 0
  mat_sio2: Common "Silicon dioxide" on selection sel_sio2
    RefractiveIndex: RefractiveIndex "折射率"
      n = n_sio2
      ki = 0
  mat_au: Common "Gold seed optical constants" on selection sel_au
    RefractiveIndex: RefractiveIndex "折射率"
      n = n_au
      ki = k_au

Physics
  ewfd: ElectromagneticWavesFrequencyDomain on all domains
    dependent variable E = {Ex, Ey, Ez}
    wee1: WaveEquationElectric "波动方程，电 1" (default)
    pec1: PerfectElectricConductor "理想电导体 1" (default)
    init1: init "初始值 1" (default)
    port1: Port "TE00 numeric input port" on selection sel_port_in | PortExcitation = on; PortType = Numeric
    port2: Port "numeric output port" on selection sel_port_out | PortExcitation = off; PortType = Numeric
    sctr1: Scattering "top, bottom, and transverse scattering boundaries" on selection sel_open

Mesh
  mesh1 "paper-seeded wave-optics mesh"
    size: MeshSizeDefault "大小" | hmax = mesh_bulk; hmin = mesh_metal/4; custom = on
    size1: Size "大小 1" on domains 2, 6, 9, 12, 15, 18, 21, 24, 27, 30, 33, 36, 39, 42, 45, 48, 51, 54, 57, 60, 63, 66, 69, 72, 75, 78, 81, 84, 87, 90, 93, 96, 99, 102, 105, 108, 111
      hmax = 0.13850
      hmin = 0.0041550
      custom = on
    size2: Size "大小 2" on domains 1, 4 | hmax = 0.057470; hmin = 0.0017240; custom = on
    size3: Size "大小 3" on boundaries 4, 7, 597, 598 | hmax = 0.10000; hmin = 0.0030000; custom = on
    ftet1: FreeTet "自由四面体网格 1" on remaining entities | optcurved = on
    size_atoms: Size "大小 4" on selection sel_atoms | hmax = mesh_metal; hmin = mesh_metal/4; custom = on

Studies
  std1 "1550 nm forward TE00 frequency-domain study"
    freq: Frequency "频域" | punit = THz; plist = freq0