// COMSOL Multiphysics 6.3.0.290 model "soi_waveguide_mode.mph"
// Outline of the model tree

Parameters
  lambda0 = 1.55[um]
  freq0 = c_const/lambda0
  wg_w = 0.6[um]
  wg_h = 0.22[um]
  box_h = 3.0[um]
  air_h = 2[um]
  side_pad = 1.5[um]
  n_air = 1.0
  n_si = 3.48
  n_sio2 = 1.444
  xmin = -wg_w/2-side_pad
  xmax = wg_w/2+side_pad
  ymin = -box_h
  ymax = wg_h+air_h
  mesh_core = 0.035[um]
  mesh_clad = 0.15[um]
  tol = 1[nm]

Selections
  sel_left: Box "框" | entitydim = 1; xmin = xmin; xmax = xmin+tol; ymin = ymin; ymax = ymax; condition = inside
  sel_right: Box "框 2" | entitydim = 1; xmin = xmax-tol; xmax = xmax; ymin = ymin; ymax = ymax; condition = inside
  sel_bottom: Box "框 3" | entitydim = 1; xmin = xmin; xmax = xmax; ymin = ymin; ymax = ymin+tol; condition = inside
  sel_top: Box "框 4" | entitydim = 1; xmin = xmin; xmax = xmax; ymin = ymax-tol; ymax = ymax; condition = inside
  sel_outer: Union "并集" | entitydim = 1; input = {sel_left, sel_right, sel_bottom, sel_top}

Geometry
  geom1 "几何 1" (2D, length unit µm)
    air_window: Rectangle "air computational window" | size = {xmax-xmin, ymax-ymin}; pos = {xmin, ymin}
    box: Rectangle "3 um buried oxide" | size = {xmax-xmin, box_h}; pos = {xmin, ymin}
    core: Rectangle "600 nm x 220 nm silicon ridge" | size = {wg_w, wg_h}; pos = {-wg_w/2, 0}
    fin: Finalize "形成联合体"

Materials
  mat_air: Common "Air" on all domains
    RefractiveIndex: RefractiveIndex "折射率"
      n = n_air
      ki = 0
  mat_sio2: Common "Silicon dioxide" on selection geom1_box_dom
    RefractiveIndex: RefractiveIndex "折射率"
      n = n_sio2
      ki = 0
  mat_si: Common "Silicon" on selection geom1_core_dom
    RefractiveIndex: RefractiveIndex "折射率"
      n = n_si
      ki = 0

Physics
  ewfd: ElectromagneticWavesFrequencyDomain "电磁波，频域" on all domains
    dependent variable E = {Ex, Ey, Ez}
    wee1: WaveEquationElectric "波动方程，电 1" (default)
    pec1: PerfectElectricConductor "理想电导体 1" (default)
    init1: init "初始值 1" (default)
    sctr1: Scattering "散射边界条件 1" on selection sel_outer

Mesh
  mesh1 "网格 1"
    size: MeshSizeDefault "大小" | hmax = mesh_clad; hmin = mesh_core/5; custom = on
    size1: Size "大小 1" on domains 1 | hmax = 0.086570; hmin = 0.0015700; custom = on
    size2: Size "大小 2" on domains 3 | hmax = 0.035920; hmin = 0.0010780; custom = on
    ftri1: FreeTri "自由三角形网格 1" on remaining entities | smoothmaxiter = 4; smoothmaxdepth = 4
    size_core: Size "大小 3" on selection geom1_core_dom | hmax = mesh_core; hmin = mesh_core/5; custom = on

Studies
  std1 "研究 1"
    mode: ModeAnalysis "1550 nm guided-mode analysis" | modeFreq = freq0; shift = 2.5

Solver configurations
  sol1 "解 1" (study std1)
    v1: Variables "因变量 1"
    e1: Eigenvalue "特征值求解器 1"
      d1: Direct "建议的直接求解器 (ewfd)"

Datasets
  dset1: Solution | solution = sol1