// COMSOL Multiphysics 6.3.0.290 model "dirac_squre - 副本.mph"
// Outline of the model tree

Parameters
  ax = 0.4[um]
  ay = 0.35[um]
  h_air = 1.55[um]
  h_PML = 2.05[um]
  h_slab = 300[nm]
  k1 = 0
  k2 = 0
  kx = k1*2*pi/2/ax
  ky = k2*2*pi/2/ay
  mov_x = 0.05[um]
  r_air = 0.1[um]
  zeta1 = 0[um]
  zeta2 = 0[um]

Coordinate systems
  pml1: PML "完美匹配层 1" on domains 3

Geometry
  geom1 "几何 1" (3D, length unit µm)
    wp1: WorkPlane "工作平面 1" | unite = on
      r1: Rectangle "矩形 1" | size = {2*ax, 2*ay}; base = center
      e1: Ellipse "椭圆 1" | semiaxes = {r_air+zeta1, r_air-zeta1}; pos = {-ax/2, ay/2}
      e2: Ellipse "椭圆 2" | semiaxes = {r_air-zeta1, r_air+zeta1}; pos = {ax/2, ay/2}
      e3: Ellipse "椭圆 3" | semiaxes = {r_air+zeta1, r_air-zeta1}; pos = {-ax, -ay/2}
      e4: Ellipse "椭圆 4" | semiaxes = {r_air+zeta1, r_air-zeta1}; pos = {ax, -ay/2}
      e5: Ellipse "椭圆 5" | semiaxes = {r_air-zeta1, r_air+zeta1}; pos = {0, -ay/2}
      mov1: Move "移动 1" | input = e1, e2; displx = 0; disply = mov_x
      uni1: Union "并集 1" | input = e3, e4, mov1(1), e5(1), mov1(2)
      int1: Intersection "交集 1" | input = r1, uni1
      r2: Rectangle "矩形 2" | size = {2*ax, 2*ay}; base = center
    ext1: Extrude "拉伸 1" | workplane = wp1; input = wp1; distance = h_slab/2
    wp2: WorkPlane "工作平面 2" | unite = on
      r3: Rectangle "矩形 3" | size = {2*ax, 2*ay}; base = center
    ext2: Extrude "拉伸 2"
      workplane = wp2
      input = wp2
      distance = {h_air, h_PML}
      scale = {{1, 1}, {1, 1}}
      displ = {{0, 0}, {0, 0}}
      twist = {0, 0}
      baseid = {0, 1, 3, 4, 2}
    fin: Finalize "形成联合体"

Materials
  mat1: Common "材料 1" on all domains
    RefractiveIndex: RefractiveIndex "折射率"
      n = 1
      ki = 0
  mat2: Common "材料 2" on domains 1
    RefractiveIndex: RefractiveIndex "折射率"
      n = 3.3
      ki = 0

Physics
  ewfd: ElectromagneticWavesFrequencyDomain "电磁波，频域" on all domains
    dependent variable E = {Ex, Ey, Ez}
    wee1: WaveEquationElectric "波动方程，电 1" (default)
    pec1: PerfectElectricConductor "理想电导体 1" (default)
    init1: init "初始值 1" (default)
    sctr1: Scattering "散射边界条件 1" on boundaries 10
    pc1: PeriodicCondition "周期性条件 1" on boundaries 2, 5, 8, 17-19
      PeriodicType = Floquet
      kFloquet = {kx, ky, 0}
      destinationDomains: boundaries 17-19
    pc2: PeriodicCondition "周期性条件 2" on boundaries 1, 4, 7, 11, 15, 42-46
      PeriodicType = Floquet
      kFloquet = {kx, ky, 0}
      destinationDomains: boundaries 42-46

Mesh
  mesh1 "网格 1" (physics-controlled)

Studies
  std1 "研究 1"
    param: Parametric "参数化扫描" (disabled) | pname = k1; plistarr = range(-0.2,0.02,0.2)
    eig: Eigenfrequency "特征频率"
      eigmethod = region
      neigs = 5
      shift = 200
      appnreigs = 6
      maxnreigs = 6
      eigsr = 160
      eiglr = 230
      eigsi = -0.1
      eigli = 1.5
      ftplistmethod = manual
      linpsolnum = auto

Solver configurations
  sol1 "解 1" (study std1)
    v1: Variables "因变量 1"
    e1: Eigenvalue "特征值求解器 1"
      d1: Direct "建议的直接求解器 (ewfd)"
  sol2 "参数化解 1" (study std1)
  sol24 "band for dirac r_air=0.1um" (study std1)

Datasets
  dset1: Solution | solution = sol1
  dset2: Solution | solution = sol2
  dset3: Solution | solution = sol24

Derived values
  gev1: EvalGlobal "特征频率 (ewfd)" | data = dset1; table = tbl1; expr = {ewfd.freq, ewfd.Qfactor}; unit = {THz, }
  gev2: EvalGlobal "特征频率 (ewfd) 1" | data = dset2; table = tbl6; expr = {ewfd.freq, ewfd.Qfactor}; unit = {THz, }

Tables
  tbl1: Table "表格 1"
    特征频率 (THz) | 频率 (THz) | 品质因子 (1)
    249.698+43.845i | 249.698 | 2.84751
    249.735+43.7954i | 249.735 | 2.85115
    257.722+1.1214e-07i | 257.722 | 1.14911e+09
    262.786+1.17552e-07i | 262.786 | 1.11774e+09
    262.79+1.16117e-07i | 262.79 | 1.13158e+09
    276.929+2.69755i | 276.929 | 51.3298
    276.948+2.69538i | 276.948 | 51.3745
    285.034+102.749i | 285.034 | 1.38704
    302.504+8.25991e-08i | 302.504 | 1.83116e+09
    324.854+1.05074e-06i | 324.854 | 1.54584e+08
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  tbl2: Table "表格 2"
  tbl3: Table "表格 3"
    // 表面积分 1
    k1 | 特征频率 (THz) | 电场，x 分量 (V*m) | 电场，y 分量 (V*m)
    0 | 189.112-0.000760976i | -1.46752e-10-1.12042e-11i | -5.3539e-10-3.71791e-11i
  tbl4: Table "表格 4"
    mov_x (nm) | 特征频率 (THz) | 频率 (THz) | 品质因子 (1)
    0.01 | 187.6-0.00106775i | 187.6 | 87848.5
    0.01 | 187.602-0.00106716i | 187.602 | 87897.8
    0.01 | 187.606-0.00106652i | 187.606 | 87952.3
    0.01 | 189.108-0.00076234i | 189.108 | 124031
    0.01 | 189.112-0.000760581i | 189.112 | 124321
    0.01 | 189.114-0.000759528i | 189.114 | 124495
    0.01 | 223.525+4.2645i | 223.525 | 26.2076
    0.01 | 223.526+4.26504i | 223.526 | 26.2044
    0.01 | 223.529+4.26432i | 223.529 | 26.2092
    0.01 | 224.389+5.13077i | 224.389 | 21.867
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  tbl5: Table "表格 5"
    // 表面积分 1
    mov_x (nm) | 特征频率 (THz) | 电场，x 分量 (V*m) | 电场，y 分量 (V*m)
    0.01 | 189.108-0.00076234i | -1.3455e-10-5.70799e-12i | 2.32869e-10+1.45123e-11i
    0.02 | 189.108-0.000762306i | 3.12187e-10+1.88541e-11i | 5.30841e-10+3.18825e-11i
    0.03 | 189.11-0.000761438i | -8.82866e-11-4.50045e-12i | 8.87205e-12+2.57135e-13i
    0.04 | 189.109-0.0007622i | 1.86425e-10+1.25931e-11i | 4.15198e-10+2.56559e-11i
    0.05 | 189.108-0.000762297i | 2.11936e-10+1.35141e-11i | 6.49406e-10+3.78134e-11i
    0.06 | 189.107-0.000762715i | 5.91793e-10+3.48356e-11i | 1.70988e-10+1.21595e-11i
    0.07 | 189.112-0.000760313i | -7.18075e-10-3.76355e-11i | -2.5466e-10-1.10835e-11i
    0.08 | 189.108-0.000762326i | -1.83534e-11+1.22671e-13i | -1.53262e-10-7.61595e-12i
    0.09 | 189.108-0.000762281i | -9.36749e-11-3.13269e-12i | 3.20004e-10+2.03214e-11i
    0.1 | 189.108-0.000762401i | 6.89131e-10+3.99096e-11i | 3.14554e-10+1.97423e-11i
  tbl6: Table "表格 6"
    k1 | 特征频率 (THz) | 频率 (THz) | 品质因子 (1)
    -0.2 | 165.084+12.9225i | 165.084 | 6.38746
    -0.2 | 181.988+14.3402i | 181.988 | 6.34537
    -0.2 | 198.778+26.9354i | 198.778 | 3.68991
    -0.2 | 205.76+0.00589538i | 205.76 | 17450.9
    -0.2 | 214.635+1.48855e-07i | 214.635 | 7.20953e+08
    -0.2 | 217.903+8.4155e-07i | 217.903 | 1.29465e+08
    -0.2 | 219.059+2.84681e-07i | 219.059 | 3.84745e+08
    -0.2 | 222.493+1.80881e-07i | 222.493 | 6.15025e+08
    -0.2 | 232.545+5.20588i | 232.545 | 22.3348
    -0.2 | 235.224+8.82526i | 235.224 | 13.3267
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
Plots
  pg1: PlotGroup3D "电场 (ewfd)" | data = dset3; phasetype = manual; phase = 180
    mslc1: Multislice "多切面 1" | expr = real(ewfd.Ez); xnumber = 0; ynumber = 0; multiplanezmethod = coord; zcoord = 0
  pg2: PlotGroup3D "电场 (ewfd) 1" | data = dset2
    mslc1: Multislice "多切面 1" | expr = ewfd.normE
  pg3: PlotGroup1D "band" | data = dset2
    glob1: Global "全局 1" | expr = ewfd.freq; unit = THz; xdata = expr; xdataexpr = k1
  pg4: PlotGroup1D "Q" | data = dset2
    glob1: Global "全局 1" | expr = ewfd.Qfactor; xdata = expr; xdataexpr = k1